# A )
# a )
2.998*10^8*m/s = 670633500 mi/hr
# b )
62.3*lb/ft^3 = 997.95 kg/m^3
# c )
1000*kg/m^3 = 8.3454 lb/gal
# D )
# a )
F_a := 800 N
x_a := 12 cm
# d )
.01*poise = 0.000671969 lb/(ft*s)
k_a := F_a/x_a
k_a = 6666.67 N/m
.01*poise = 0.001 kg/(m*s)
# b )
F_b := 1200 N
x_b := .3 m
# e )
.08206 L*atm/(mole*K) = 8.31473 J/(K*mol)
k_b := F_b/x_b
k_b = 4000 N/m
# B )
R_circle := 6 cm
r := 3 cm  # E )
A_circle := 4*π^2*R_circle*r
mass_pend := 50 gm
k_pend. := 100*N/m
Vol := 2*π^2*R_circle*r^2
# a )
T_pend. := 2*π/sqrt(k_pend./mass_pend)
A_circle = 710.612 cm^2
Vol = 1065.92 cm^3
T_pend. = 0.140496 s
# C )
mass_C := 150 kg
# b )
T_pendb := 1 s
F_g := mass_C*g
F_g = 1471 N
k_pendb := 4*π^2*mass_pend/T_pendb^2
# b )
max := 300 N
wire_count := F_g/max
k_pendb = 1.97392 N/m
wire_count = 4.90332
# 5 wires are required.
# F )
# a )
E_volt := 12 V
R[1] := 30 ohm
R[2] := 40 ohm
R[3] := 60 ohm
R_eqinverse := sum(1/R[i], i = 1 .. 3)
R_eq := 1/R_eqinverse
R_eq = 13.3333 Ω
I := E_volt/R_eq
I = 0.9 A
# G )
CS1 := [8.10; 7.25; 5.89; 7.12; 5.60; 1.85; 4.00; 5.58; 9.92; 4.25]
CS2 := [5.79; 2.81; 3.27; 4.87; 5.49; 6.60; 2.63; 4.64; 6.96; 5.83]
# (cough syrup) | (soup)
# a )
mean(CS1) = 5.956
mean(CS2) = 4.889
# b )  Soup had faster recoveries (4.89 days) on average than
# syrup (5.96 days).
# c )
var(CS1) = 4.72074
var(CS2) = 2.13839
# Cough syrup (CS1) had higher variability (4.721) than
# soup (2.138).
# H )
T_C := [10; 20; 30; 40; 50; 60; 70; 80; 90]
V_mV := [.397; .796; 1.204; 1.612; 2.023; 2.436; 2.851; 3.267; 3.662]
intercept(T_C, V_mV) = -0.0216944
slope(T_C, V_mV) = 0.040985
V_T := .041*T_C - 0.022
# a )
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linterp(T_C, V_mV, 85) = 3.4645
3.465 mV
# b )
linterp(V_mV, T_C, 2.500) = 61.5422
61.542 °C
# c ) | The regression line fits the data very well.
