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# A )
# B )
f(x, y) := 2*x - 9*y^3
# [component: inputs f]
# The plot is not single variable becuase it plots two different variables changing.
# C )
F_piston := 800 N
SA := 24 cm^2
# a )
P := F_piston/SA = 333333 Pa  # error: This variable is undefined.
# b )
SA_circle := π*(d/2)^2  # error: This variable is undefined.
d := sqrt(4*SA/π)
d = 5.52791 cm
# D )
L := 80 ft
α_1 := 43.53 deg
α_2 := 3.58 deg
Height_groundtosight := L*sin(α_2)
Height_sighttotip := L*sin(α_1)
Height := Height_groundtosight + Height_sighttotip
Height = 18.3167 m
# E )
c := [4, 5, 9, 2, 1]
a := [5; 6; 7; 4; 6; 2; 8]
b := [6; 9; 5; 8; 5; 9; 1]
d := [7, 5, 4, 9, 7]
mean(b) = 6.14286
stdev(b) = 2.64189
mean(c) = 4.2  # There do not appear to be any issues.
stdev(c) = 2.78568
mean(d) = 6.4
stdev(d) = 1.74356
# F )
A := [5, 4, 6; 2, 2, 6]
B := [6, 4, 2; 1, 9, 8]
C := [3, 7; 6, 7; 0, 5]
A + B = [11, 8, 8; 3, 11, 14]
A - B = [-1, 0, 4; 1, -7, -2]
A - C =  # error: These array dimensions do not match.
# no problems
# no problems
# This doesn't work because the matrices have different dimensions.
C*A = [29, 26, 60; 44, 38, 78; 10, 10, 30]
A*B =  # error
A*C = [39, 93; 18, 58]
# This doesn't work be-
# cause they have the same
# dimensions.
# Works but with different
# dimensions than the two
# original matrices.
# Works but with different
# dimensions than the two
# original matrices.
# G )
transpose(b) = [6, 9, 5, 8, 5, 9, 1]
transpose(c) = [4; 5; 9; 2; 1]
transpose(d) = [7; 5; 4; 9; 7]
# No issues are visible.
