c := [4, 5, 9, 2, 1]
d := [7, 5, 4, 9, 7]
G := [6, 7, 8; 1, 0, 1; 7, 7, 0]
H := [1, 0, 2; 3, 5, 1; 2, 4, 0]
b := [6; 9; 5; 8; 5; 9; 1]
# A )
sort(c) =  # error: This value must be a vector.
sort(d) =  # error
# Horizontal matrices are not sortable because Mathcad doesn't see them as vectors.
# Matrices transposed to vertical are sortable: (ex.)
sort(b) = [1; 5; 5; 6; 8; 9; 9]
sort(transpose(c)) = [1; 2; 4; 5; 9]
# B )
|G| = 63
|H| = 0
# C )
H^-1 = [
    -1.80144e15, 3.60288e15, -4.5036e15;
    9.0072e14, -1.80144e15, 2.2518e15;
    9.0072e14, -1.80144e15, 2.2518e15
]
G^-1 = [-0.111111, 0.888889, 0.111111; 0.111111, -0.888889, 0.031746; 0.111111, 0.111111, -0.111111]
# No problems encountered.
# D )
G*G^-1 = [1, 0, 0; 0, 1, 0; 0, 0, 1]
G^-1*G = [1, 0, 0; 0, 1, 0; 0, 0, 1]
# The two inverses multiplied give the identity matrix in either order of multiplication.
# E )
# x = 30.048
# y = 0.526
# z = -6.746
# t = 0.957
C_e := [2, 1, 2, 3; 2, 4, 4, 5; 1, 0, 1, 7; 1, 8, 0, 6]
R_e := [50; 40; 30; 40]
[x; y; z; t] := C_e^-1*R_e = [30.0478; 0.526316; -6.74641; 0.956938]
2*x + y + 2*z + 3*t = 50
2*x + 4*y + 4*z + 5*t = 40  # Results confirmed.
x + z + 7*t = 30
x + 8*y + 6*t = 40
# F )
C_f := [4, 5, 6; 1, 2, 3; 7, 8, 9]
R_f := [10; 20; 30]
C_f^-1 =  # error: Found a singularity while evaluating this expression.
# Not solvable by matrix calculations since an inverse does not exist for C.f (the matrix is singular).
# G )
S_3 := 1 L
S_1 + 0*S_2 - 0.196*S_4 := 0.996*S_3 = 0.996  # error: A name is required here.  # for water
0*S_1 + 0.01*S_2 - 0.004*S_4 := 0.004*S_3 = 0.004  # error: A name is required here.  # for CS
0*S_1 + 0.99*S_2 - 0.8*S_4 = 0  # for CG
M := [1, 0, -.196; 0, .01, -.004; 0, .99, -.8]
N := [.996; .004; 0]
[S_1; S_2; S_4] := M^-1*N*L = [1.18812; 0.792079; 0.980198] L
[S_1; S_2; S_4] = [1.18812; 0.792079; 0.980198] L
# In :
S_1 + S_2 = 1.9802 L
# Balance verified.
# Out :
S_3 + S_4 = 1.9802 L
# H )
originals := [87; 85; 43; 62; 97; 88; 87; 58; 67; 79; 91; 82; 80; 73; 58]
sorted := sort(originals)
sorted = [43; 58; 58; 62; 67; 73; 79; 80; 82; 85; 87; 87; 88; 91; 97]
sorted[7] = 80
median(originals) = 80
# Result confirmed.
# In : | Out : | In : | Out :
# I )
# a )
# a :
124 + 380 + 149 + 92 = 54 + 136 + X1 + X4
745 := 190 + X1 + X4  # error: A name is required here.
# b :
(420 + X1 + 252 + X3) = 147 + 380 + X2 + 376
672 + X1 + X3 = 903 + X2
# c :
(X4 + 147 + 176 + 233) = 148 + 149 + 124 + 198
556 + X4 = 619
# d :
(376 + 198 + 131 + 125) = X3 + 233 + 156 + 247
830 := 636 + X3  # error: A name is required here.
# b )
X1 + X4 = 555
# X4 = 63
X1 + X3 - X2 = 231
# X3 = 194
counts := [1, 0, 0, 1; 0, 0, 0, 1; 1, -1, 1, 0; 0, 0, 1, 0]
constants := [555; 63; 231; 194]
[X1; X2; X3; X4] := counts^-1*constants = [492; 455; 194; 63]
# c ) There is evidence for U-turns because the number of cars entering several intersections from one direction is not equal to the sum of those leaving in the other three directions. Therefore, some cars are leaving in the same direction.
